// COMSOL Multiphysics 6.2.0.415 model "exp 5.mph"
// Outline of the model tree

Geometry
  geom1 "Geometry 1" (3D, length unit cm)
    blk1: Block | size = {10, 1, 1}
    sph1: Sphere | pos = {5, 0, 0}; r = 10
    fin: Finalize "Form Union"

Materials
  mat1: Common "N42UH (Sintered NdFeB)" on domains 2
    def "Basic"
      electricconductivity = 1/1.4[uohm*m]
      relpermittivity = 1
    RemanentFluxDensity
      murec = 1.05
      normBr = 1.31[T]
  mat2: Common "Air" on domains 1
    def "Basic"
      thermalexpansioncoefficient = alpha_p(pA,T)
      molarmass = 0.02897[kg/mol]
      bulkviscosity = muB(T)
      relpermeability = 1
      relpermittivity = 1
      dynamicviscosity = eta(T)
      ratioofspecificheat = 1.4
      electricconductivity = 0[S/m]
      heatcapacity = Cp(T)
      density = rho(pA,T)
      thermalconductivity = k(T)
      soundspeed = cs(T)
      eta: Piecewise | arg = T; pieces = {200.0, 1600.0, -8.38278E-7+8.35717342E-8*T^1-7.69429583E-11*T^2+4.6437266E-14*T^3-1.06585607E-17*T^4}; argunit = K; fununit = Pa*s
      Cp: Piecewise | arg = T; pieces = {200.0, 1600.0, 1047.63657-0.372589265*T^1+9.45304214E-4*T^2-6.02409443E-7*T^3+1.2858961E-10*T^4}; argunit = K; fununit = J/(kg*K)
      rho: Analytic | expr = pA*0.02897/R_const[K*mol/J]/T; args = {pA, T}; fununit = kg/m^3; argunit = {Pa, K}
      k: Piecewise | arg = T; pieces = {200.0, 1600.0, -0.00227583562+1.15480022E-4*T^1-7.90252856E-8*T^2+4.11702505E-11*T^3-7.43864331E-15*T^4}; argunit = K; fununit = W/(m*K)
      cs: Analytic | expr = sqrt(1.4*R_const[K*mol/J]/0.02897*T); args = T; fununit = m/s; argunit = K
      an1: Analytic | funcname = alpha_p; expr = -1/rho(pA,T)*d(rho(pA,T),T); args = {pA, T}; fununit = 1/K; argunit = {Pa, K}
      an2: Analytic "Analytic 2a" | funcname = muB; expr = 0.6*eta(T); args = T; fununit = Pa*s; argunit = K
    RefractiveIndex
      n = 1
      ki = 0
    NonlinearModel
      BA = def.gamma-1
    idealGas
      Rs = R_const/Mn
      heatcapacity = Cp(T)
      ratioofspecificheat = 1.4
      molarmass = 0.02897[kg/mol]
      Cp: Piecewise | arg = T; pieces = {200.0, 1600.0, 1047.63657-0.372589265*T^1+9.45304214E-4*T^2-6.02409443E-7*T^3+1.2858961E-10*T^4}; argunit = K; fununit = J/(kg*K)

Physics
  mfnc: MagnetostaticsNoCurrents "Magnetic Fields, No Currents" on all domains
    dependent variable Vm
    mfc1: MagneticFluxConservation (default) | ConstitutiveRelationBH = Magnetization; M = {0, 0, 0}
    mi1: MagneticInsulation (default)
    init1: init "Initial Values 1" (default)
    mfc2: MagneticFluxConservation on domains 2
      ConstitutiveRelationBH = Magnetization
      M = {0, 0, 1006582}
      materialType = from_mat

Mesh
  mesh1 "Mesh 1" (physics-controlled)

Studies
  std1 "Study 1"
    stat: Stationary

Solver configurations
  sol1 "Solution 1" (study std1)
    v1: Variables "Dependent Variables 1"
    s1: Stationary "Stationary Solver 1"
      fc1: FullyCoupled | linsolver = i1
      i1: Iterative | prefuntype = right; nlinnormuse = on
        mg1: Multigrid

Datasets
  dset1: Solution | solution = sol1
  cpl1: CutPlane | data = dset1; quickplane = zx

Plots
  pg1: PlotGroup3D "Magnetic Flux Density Norm (mfnc)" | data = dset1
    mslc1: Multislice
      expr = mfnc.normB
      multiplanexmethod = coord
      xcoord = mfnc.CPx
      multiplaneymethod = coord
      ycoord = mfnc.CPy
      multiplanezmethod = coord
      zcoord = mfnc.CPz
    strmsl1: StreamlineMultislice
      expr = {mfnc.Bx, mfnc.By, mfnc.Bz}
      multiplanexmethod = coord
      xcoord = mfnc.CPx
      multiplaneymethod = coord
      ycoord = mfnc.CPy
      multiplanezmethod = coord
      zcoord = mfnc.CPz
      udist = 0.02
      col1: Color "Color Expression 1" | expr = mfnc.normB
      filt1: Filter | expr = !isScalingSystemDomain
    arws1: ArrowSurface | data = cpl1; expr = {mfnc.Bx, mfnc.By, mfnc.Bz}; arrowcount = 500; arrowlength = normalized
  pg2: PlotGroup3D "Magnetic Scalar Potential (mfnc)" | data = dset1
    mslc1: Multislice
      expr = Vm
      multiplanexmethod = coord
      xcoord = mfnc.CPx
      multiplaneymethod = coord
      ycoord = mfnc.CPy
      multiplanezmethod = coord
      zcoord = mfnc.CPz
    strmsl1: StreamlineMultislice
      expr = {mfnc.Hx, mfnc.Hy, mfnc.Hz}
      multiplanexmethod = coord
      xcoord = mfnc.CPx
      multiplaneymethod = coord
      ycoord = mfnc.CPy
      multiplanezmethod = coord
      zcoord = mfnc.CPz
      udist = 0.02
      col1: Color "Color Expression 1" | expr = Vm
      filt1: Filter | expr = !isScalingSystemDomain